** PARTS
*Part, name=Part-1
*Node
      1,          0.5, 0.0500000007
      2,          0.5,           0.
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** VUEL ELEMENTS
*USER ELEMENT, TYPE=VU2, NODES=4, COORDINATES=2, PROPERTIES=18, VARIABLES=44
1,2,11
*ELEMENT, type=VU2, elset=pfczm
   1,    1,    7, 1530, 1022
   2,    7,    8, 1531, 1530
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*UEL PROPERTY, ELSET=pfczm
** Unit g,mm,ms
 117.0e3, 0.34, 2.5e3, 230.0, 0.8, 4.0e-3, 1.0, 8.924e-3,
 1.0e-5, 1.0e-8, 2.0e-3, 1.2, 0.06, 3910.0, 1.51, 2.0,
 0.0, 2.0
** DUMMY ELEMENTS
*ELEMENT,TYPE=CPE4R,ELSET=DUMMY
10000001,    1,    7, 1530, 1022
10000002,    7,    8, 1531, 1530
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*SOLID SECTION,ELSET=DUMMY,MATERIAL=DUMMY
*End Part
** ASSEMBLY
**
*Assembly, name=Assembly
**
*Instance, name=Part-1-1, part=Part-1
*End Instance
**
*Nset, nset=NSET-all, instance=Part-1-1, generate
 1,  8261,  1
*Nset, nset=SET-1, instance=Part-1-1
    1,    2,    5,    6,    7,    8
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*Nset, nset=SET-2, instance=Part-1-1
    1,    2,    3,    4,    5,    6
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*Nset, nset=SET-3, instance=Part-1-1
    3,    4,    5,    6,  515,  516
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*Elset, elset=ElSET-all, instance=Part-1-1, generate
 1,  7500,  1
**
*End Assembly
**
** DUMMY MATERIAL
*MATERIAL,NAME=DUMMY
*DENSITY
1.0E-6
*ELASTIC
1.0E-8, 0.2
*Depvar
     1
*User Defined Field
**
** PREDEFINED FIELDS
**
** Name: IC-1   Type: Velocity
*Initial Conditions, type=VELOCITY
SET-1, 1, 250.
** ----------------------------------------------------------------
**
** STEP: Step-1
**
*Step, name=Step-1, nlgeom=NO
*Dynamic Temperature-displacement, Explicit, direct user control
1e-8, 0.001
**
** BOUNDARY CONDITIONS
**
** Name: Disp-BC-1 Type: λ҆/ת½Ǎ
*Boundary
SET-2, 2, 2
*Boundary
SET-3, 11, 11
**
** OUTPUT REQUESTS
**
*Restart, write, number interval=1, time marks=NO
**
** FIELD OUTPUT: F-Output-1
**
*Output, field, time interval=1e-6
*Node Output
A, NT, U, V
*Element Output, directions=YES
E, MISES, S, SDV
**
** HISTORY OUTPUT: H-Output-1
**
*Output, history, time interval=5e-6
*Energy Output
ALLKE, ALLSE, ETOTAL
*End Step
